// COMSOL Multiphysics 5.4.0.246 model "full_model.mph"
// Outline of the model tree

Parameters
  core_r = 7e-3
  core_l = 90e-3
  rot_alpha = 45  // rot angle deg
  rot_beta = 45  // rot angle deg
  dist_beta = 25e-3
  dist_alpha = 25e-3
  N = 250  // # turns per coil
  i1 = 1
  i2 = 0
  i3 = 0
  i4 = 0
  i5 = 0
  i6 = 0
  i7 = 0
  i8 = 0

Geometry
  geom1 "Geometry 1" (3D, length unit m)
    pt1: Point
    cyl1: Cylinder | pos = {0, 0, -core_l}; r = core_r; h = core_l
    wp1: WorkPlane | quickplane = yz; unite = on
      b1: BezierPolygon "Bézier Polygon 1"
        p = 
          {0.007, 0.007, 0.01, 0.03, 0.007}
          {-0.09, -0.0204341858625, -0.0204341858625, -0.09, -0.09}
        degree = {1, 1, 1, 1}
        w = {1, 1, 1, 1, 1, 1, 1, 1}
    rev1: Revolve | workplane = wp1; input = wp1; angtype = full
    mov2: Move | input = cyl1, rev1; displx = 0; disply = 0; displz = -dist_alpha
    rot1: Rotate | input = mov2; rot = rot_alpha; axistype = y
    cyl2: Cylinder | pos = {0, 0, -core_l}; r = core_r; h = core_l
    wp2: WorkPlane | quickplane = yz; unite = on
      b1: BezierPolygon "Bézier Polygon 1"
        p = 
          {0.007, 0.007, 0.010, 0.03, 0.007}
          {-0.09, -0.0204341858625, -0.0204341858625, -0.09, -0.09}
        degree = {1, 1, 1, 1}
        w = {1, 1, 1, 1, 1, 1, 1, 1}
    rev2: Revolve | workplane = wp2; input = wp2; angtype = full
    rot2: Rotate | input = cyl2, rev2; rot = 90; axistype = y
    rot3: Rotate | input = rot2; rot = 45
    mov1: Move | input = rot3; displx = -dist_beta/sqrt(2); disply = -dist_beta/sqrt(2); displz = 0
    rot4: Rotate | input = mov1; rot = rot_beta; axis = {1, -1, 0}; axistype = cartesian
    copy1: Copy | input = rot1; keep = on; displx = 0; disply = 0; displz = 0
    rot5: Rotate | input = copy1; rot = 90
    copy2: Copy | input = rot5; keep = on; displx = 0; disply = 0; displz = 0
    mir1: Mirror | input = copy2; axis = {0, 1, 0}
    copy3: Copy | input = rot1; keep = on; displx = 0; disply = 0; displz = 0
    mir2: Mirror | input = copy3; axis = {1, 0, 0}
    copy4: Copy | input = rot4; keep = on; displx = 0; disply = 0; displz = 0
    rot6: Rotate | input = copy4; rot = 90
    copy5: Copy | input = rot6; keep = on; displx = 0; disply = 0; displz = 0
    rot7: Rotate | input = copy5; rot = 90
    copy6: Copy | input = rot7; keep = on; displx = 0; disply = 0; displz = 0
    rot8: Rotate | input = copy6; rot = 90
    elp1: Ellipsoid "air_enclosure" | pos = {0, 0, -5e-2}; semiaxes = {15e-2, 15e-2, 10e-2}
    elp2: Ellipsoid "work_space" | semiaxes = {2e-2, 2e-2, 1.5e-2}
    fin: Finalize "Form Union"

Materials
  mat2: Common "Air" on all domains
    def "Basic"
      thermalexpansioncoefficient = alpha_p(pA,T)
      molarmass = 0.02897
      bulkviscosity = muB(T)
      relpermeability = 1
      relpermittivity = 1
      dynamicviscosity = eta(T)
      ratioofspecificheat = 1.4
      electricconductivity = 0[S/m]
      heatcapacity = Cp(T)
      density = rho(pA,T)
      thermalconductivity = k(T)
      soundspeed = cs(T)
      eta: Piecewise | arg = T; pieces = {200.0, 1600.0, -8.38278E-7+8.35717342E-8*T^1-7.69429583E-11*T^2+4.6437266E-14*T^3-1.06585607E-17*T^4}; argunit = K; fununit = Pa*s
      Cp: Piecewise | arg = T; pieces = {200.0, 1600.0, 1047.63657-0.372589265*T^1+9.45304214E-4*T^2-6.02409443E-7*T^3+1.2858961E-10*T^4}; argunit = K; fununit = J/(kg*K)
      rho: Analytic | expr = pA*0.02897/R_const[K*mol/J]/T; args = {pA, T}; dermethod = manual; argders = {{pA, d(pA*0.02897/R_const/T,pA)}, {T, d(pA*0.02897/R_const/T,T)}}; argunit = Pa,K; fununit = kg/m^3
      k: Piecewise | arg = T; pieces = {200.0, 1600.0, -0.00227583562+1.15480022E-4*T^1-7.90252856E-8*T^2+4.11702505E-11*T^3-7.43864331E-15*T^4}; argunit = K; fununit = W/(m*K)
      cs: Analytic | expr = sqrt(1.4*R_const[K*mol/J]/0.02897*T); args = T; dermethod = manual; argunit = K; fununit = m/s
      an1: Analytic | funcname = alpha_p; expr = -1/rho(pA,T)*d(rho(pA,T),T); args = {pA, T}; argunit = Pa,K; fununit = 1/K
      an2: Analytic "Analytic 2a" | funcname = muB; expr = 0.6*eta(T); args = T; argunit = K; fununit = Pa*s
    RefractiveIndex
      n = 1
      ki = 0
    NonlinearModel
      BA = (def.gamma+1)/2
  mat1: Common "Soft Iron (Without Losses)" on domains 3, 6, 7, 11-15
    def "Basic"
      electricconductivity = 0[S/m]
      relpermittivity = 1
      relpermeability = 1000
    BHCurve
      normB = BH(normHin)
      normH = BH_inv(normBin)
      Wpm = BH_prim(normHin)
      normHin = sqrt(H1^2+H2^2+H3^2)
      normBin = sqrt(B1^2+B2^2+B3^2)
      DESCR_PREFIX:normHin = Magnetic field norm
      DESCR_PREFIX:normBin = Magnetic flux density norm
      BH: Interpolation
        table = 
          {0.0, 0.0}
          {96.4313225104, 1.54548349093}
          {297.8785047344959, 1.9503339031}
          {806.69744232229, 2.12744782926}
          {1600.8254707885794, 2.21139128373}
          {4005.1241340402776, 2.24565770308}
          {7997.349024907017, 2.26295200605}
          {15999.625295945385, 2.28873078958}
        extrap = linear
        argunit = A/m
        fununit = T
        defineinv = on
        defineprimfun = on
    EffectiveBHCurve
      normBeff = BHeff(normHeffin)
      normHeff = BHeff_inv(normBeffin)
      normHeffin = sqrt(realdot(H1,H1)+realdot(H2,H2)+realdot(H3,H3))
      normBeffin = sqrt(realdot(B1,B1)+realdot(B2,B2)+realdot(B3,B3))
      DESCR_PREFIX:normHeffin = Effective magnetic field norm
      DESCR_PREFIX:normBeffin = Effective magnetic flux density norm
      BHeff: Interpolation
        table = 
          {0.0, 0.0}
          {96.4313225104, 1.54548349093}
          {297.8785047344959, 1.9503339031}
          {806.69744232229, 2.12744782926}
          {1600.8254707885794, 2.21139128373}
          {4005.1241340402776, 2.24565770308}
          {7997.349024907017, 2.26295200605}
          {15999.625295945385, 2.28873078958}
        extrap = linear
        argunit = A/m
        fununit = T
        defineinv = on
  mat3: Common "Copper" on domains 2, 4, 5, 8, 9, 16-18
    def "Basic"
      relpermeability = 1
      electricconductivity = 5.998e7[S/m]
      thermalexpansioncoefficient = 17e-6[1/K]
      heatcapacity = 385[J/(kg*K)]
      relpermittivity = 1
      density = 8960[kg/m^3]
      thermalconductivity = 400[W/(m*K)]
    Enu "Young's modulus and Poisson's ratio"
      youngsmodulus = 110e9[Pa]
      poissonsratio = 0.35
    linzRes "Linearized resistivity"
      rho0 = 1.72e-8[ohm*m]
      alpha = 0.0039[1/K]
      Tref = 298[K]

Physics
  mf: InductionCurrents "Magnetic Fields" on all domains
    dependent variable A = {Ax, Ay, Az}
    al1: AmperesLaw "Ampère's Law 1" (default)
    mi1: MagneticInsulation (default)
    init1: init "Initial Values 1" (default)
    coil1: Coil on domains 8
      ConductorModel = Multi
      CoilType = Numeric
      ICoil = i1[A]
      N = N
      ConstitutiveRelationBH = RelativePermeability
      ccc1: CoilCurrentCalculation "Geometry Analysis 1" (default)
        ct1: CoilTerminal "Input 1" on boundaries 55 | Reverse = 0
    coil2: Coil on domains 4
      ConductorModel = Multi
      CoilType = Numeric
      ICoil = i2
      N = N
      ConstitutiveRelationBH = RelativePermeability
      ccc1: CoilCurrentCalculation "Geometry Analysis 1" (default)
        ct1: CoilTerminal "Input 1" on boundaries 22, 55 | Reverse = 0
    al2: AmperesLaw "ampere_law_coil" on domains 3, 6, 7, 11-15 | ConstitutiveRelationBH = BHCurve

Mesh
  mesh1 "Mesh 1"
    size: MeshSizeDefault | hmax = 0.03; hmin = 0.0054; hcurve = 0.6; hnarrow = 0.5; hgrad = 1.5
    ftet3: FreeTet "work_space_mesh" on domains 10
      size1: Size on domains 10 | hmax = 1e-3; hauto = 2; custom = on
    ftet2: FreeTet "cores" on domains 3, 6, 7, 11-15
      size1: Size on domains 3, 6, 7, 11-15 | hauto = 3
    ftet4: FreeTet "remaining" on domains 1, 2, 4, 5, 8, 9, 16-18

Studies
  std1 "single_coil"
    ccc: CoilCurrentCalculation "Coil Geometry Analysis"
    stat: Stationary
  std2 "multiple_coils"
    param: Parametric "Parametric Sweep" | pname = {i1, i2}; plistarr = {{1,0}, {0,1}}; punit = {, }
    ccc: CoilCurrentCalculation "Coil Geometry Analysis"
    stat: Stationary "multiple_coils"

Solver configurations
  sol1 "Solution 1" (study std1)
    v1: Variables "Dependent Variables 1"
    s1: Stationary "Stationary Solver 1"
      dDef: Direct
      se1: Segregated | segterm = itertol; segiter = 6
        ss1: SegregatedStep | segvar = {comp1_mf_coil1_ccc1_s, comp1_mf_coil2_ccc1_s}; linsolver = dDef
        ss2: SegregatedStep
          segvar = {comp1_mf_coil1_ccc1_p, comp1_mf_coil2_ccc1_p, comp1_mf_coil1_ccc1_lm, comp1_mf_coil2_ccc1_lm}
          linsolver = dDef
    su1: StoreSolution
    v2: Variables "Dependent Variables 2" | initmethod = sol; notsolmethod = sol
    s2: Stationary "Stationary Solver 2"
      fc1: FullyCoupled | linsolver = i1
      i1: Iterative | linsolver = fgmres; nlinnormuse = on
        mg1: Multigrid
  sol3 "Solution 3" (study std2)
    // same settings as sol1
  sol5 "Parametric Solutions 1" (study std2)
  sol4 "Solution Store 2" (study std2)
  sol8 "Solution Store 1" (study std1)

Datasets
  dset1: Solution | solution = sol1
  cpt1: CutPoint3D
    data = dset1
    method = grid
    pointx = 0
    pointy = 0
    pointz = 0
    gridx = range(-0.005,0.001,0.005)
    gridy = range(-0.005,0.001,0.005)
    gridz = range(-0.005,0.001,0.005)
  dset3: Solution | solution = sol3
  dset4: Solution | solution = sol4
  dset5: Solution | solution = sol5
  dset6: Solution | solution = sol8

Derived values
  pev1: EvalPoint "Point Evaluation 1" | data = cpt1; table = tbl1; expr = {mf.Bx, mf.By, mf.Bz}

Tables
  tbl1: Table
    // Point Evaluation 1 (mf.Bx)
    Magnetic flux density, x component (T), Point: (-0.005, -0.005, -0.005) | Magnetic flux density, x component (T), Point: (-0.004, -0.005, -0.005) | Magnetic flux density, x component (T), Point: (-0.003, -0.005, -0.005) | Magnetic flux density, x component (T), Point: (-0.002, -0.005, -0.005) | Magnetic flux density, x component (T), Point: (-0.001, -0.005, -0.005) | Magnetic flux density, x component (T), Point: (0, -0.005, -0.005) | Magnetic flux density, x component (T), Point: (0.001, -0.005, -0.005) | Magnetic flux density, x component (T), Point: (0.002, -0.005, -0.005) | Magnetic flux density, x component (T), Point: (0.003, -0.005, -0.005) | Magnetic flux density, x component (T), Point: (0.004, -0.005, -0.005) | Magnetic flux density, x component (T), Point: (0.005, -0.005, -0.005) | Magnetic flux density, x component (T), Point: (-0.005, -0.004, -0.005)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
    -0.000314848 | -0.000248856 | -0.000173885 | -0.000112911 | -5.19379e-05 | 9.03539e-06 | 7.00087e-05 | 0.000137583 | 0.000189969 | 0.000242355 | 0.000272755 | -0.000323682

Plots
  pg1: PlotGroup3D "overview_flux_density" | data = dset1
    mslc1: Multislice | expr = mf.normB
  pg2: PlotGroup3D "overview_flux_zy" | data = dset5
    slc1: Slice | expr = mf.normB; quickxnumber = 1
  pg3: PlotGroup3D "overview_flux_xy" | data = dset1
    slc1: Slice | expr = mf.normB; quickplane = xy; quickznumber = 1; genmethod = pointnormal